** Cantilever beam, steel, tip load, geometric nonlinearity
*HEADING
Cantilever beam 200x10x10 mm, tip load 500 N
*NODE, NSET=NALL
1, 0.0000, 0.0000, 0.0000
2, 5.0000, 0.0000, 0.0000
3, 10.0000, 0.0000, 0.0000
4, 15.0000, 0.0000, 0.0000
5, 20.0000, 0.0000, 0.0000
6, 25.0000, 0.0000, 0.0000
7, 30.0000, 0.0000, 0.0000
8, 35.0000, 0.0000, 0.0000
9, 40.0000, 0.0000, 0.0000
10, 45.0000, 0.0000, 0.0000
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*ELEMENT, TYPE=C3D8I, ELSET=EALL
1, 1, 2, 43, 42, 206, 207, 248, 247
2, 2, 3, 44, 43, 207, 208, 249, 248
3, 3, 4, 45, 44, 208, 209, 250, 249
4, 4, 5, 46, 45, 209, 210, 251, 250
5, 5, 6, 47, 46, 210, 211, 252, 251
6, 6, 7, 48, 47, 211, 212, 253, 252
7, 7, 8, 49, 48, 212, 213, 254, 253
8, 8, 9, 50, 49, 213, 214, 255, 254
9, 9, 10, 51, 50, 214, 215, 256, 255
10, 10, 11, 52, 51, 215, 216, 257, 256
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*ELSET, ELSET=ETIP, GENERATE
601, 640
*NSET, NSET=FIXED
1, 42, 83, 124, 165, 206, 247, 288
329, 370, 411, 452, 493, 534, 575, 616
657, 698, 739, 780, 821, 862, 903, 944
985
*NSET, NSET=TIP
41, 82, 123, 164, 205, 246, 287, 328
369, 410, 451, 492, 533, 574, 615, 656
697, 738, 779, 820, 861, 902, 943, 984
1025
*MATERIAL, NAME=STEEL
*ELASTIC
210000., 0.3
*DENSITY
7.85e-9
*ELSET, ELSET=EBODY, GENERATE
1, 600
*SOLID SECTION, ELSET=EBODY, MATERIAL=STEEL
*BOUNDARY
FIXED, 1, 3, 0.
*STEP, NLGEOM, INC=100
*STATIC
0.1, 1.0, 1e-5, 0.25
*CLOAD
41, 3, -20.000000
82, 3, -20.000000
123, 3, -20.000000
164, 3, -20.000000
205, 3, -20.000000
246, 3, -20.000000
287, 3, -20.000000
328, 3, -20.000000
369, 3, -20.000000
410, 3, -20.000000
451, 3, -20.000000
492, 3, -20.000000
533, 3, -20.000000
574, 3, -20.000000
615, 3, -20.000000
656, 3, -20.000000
697, 3, -20.000000
738, 3, -20.000000
779, 3, -20.000000
820, 3, -20.000000
861, 3, -20.000000
902, 3, -20.000000
943, 3, -20.000000
984, 3, -20.000000
1025, 3, -20.000000
*NODE PRINT, NSET=TIP
U
*EL FILE
S
*NODE FILE
U
*END STEP
