** Cantilever beam, steel, tip load, geometric nonlinearity
*HEADING
Cantilever beam 200x10x10 mm, tip load 500 N
*NODE, NSET=NALL
1, 0.0000, 0.0000, 0.0000
2, 5.0000, 0.0000, 0.0000
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*ELEMENT, TYPE=C3D8I, ELSET=EALL
1, 1, 42, 43, 2, 206, 247, 248, 207
2, 2, 3, 44, 43, 207, 208, 249, 248
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*NSET, NSET=FIXED
1, 42, 83, 124, 165, 206
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*NSET, NSET=TIP
41, 82, 123, 164, 205, 246
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*MATERIAL, NAME=STEEL
*ELASTIC
210000., 0.3
*DENSITY
7.85e-9
*SOLID SECTION, ELSET=EALL, MATERIAL=STEEL
*BOUNDARY
FIXED, 1, 3, 0.
*STEP, NLGEOM, INC=100
*STATIC
0.1, 1.0, 1e-5, 0.25
*CLOAD
41, 3, -20.000000
82, 3, -20.000000
123, 3, -20.000000
164, 3, -20.000000
205, 3, -20.000000
246, 3, -20.000000
287, 3, -20.000000
328, 3, -20.000000
369, 3, -20.000000
410, 3, -20.000000
451, 3, -20.000000
492, 3, -20.000000
533, 3, -20.000000
574, 3, -20.000000
615, 3, -20.000000
656, 3, -20.000000
697, 3, -20.000000
738, 3, -20.000000
779, 3, -20.000000
820, 3, -20.000000
861, 3, -20.000000
902, 3, -20.000000
943, 3, -20.000000
984, 3, -20.000000
1025, 3, -20.000000
*NODE PRINT, NSET=TIP
U
*EL FILE
S
*NODE FILE
U
*END STEP
