** Cantilever beam, steel, tip load, geometric nonlinearity
*HEADING
Cantilever beam 200x10x10 mm, tip load 500 N
*NODE, NSET=NALL
1, 0.0000, 0.0000, 0.0000
2, 5.0000, 0.0000, 0.0000
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*ELEMENT, TYPE=C3D8I, ELSET=EALL
1, 1, 2, 43, 42, 206, 207, 248, 247
2, 2, 3, 44, 43, 207, 208, 249, 248
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*NSET, NSET=FIXED
1, 42, 83, 124, 165, 206
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*NSET, NSET=TIP
41, 82, 123, 164, 205, 246
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*MATERIAL, NAME=STEEL
*ELASTIC
210000., 0.3
*SOLID SECTION, ELSET=EALL, MATERIAL=STEEL
*BOUNDARY
CLAMP, 1, 3, 0.
*STEP
*STATIC
*CLOAD
TIP, 3, -20.
*NODE FILE
U
*END STEP
