** cantilever 1.0x0.1x0.1
*NODE, NSET=NALL
1, 0, 0, 0
2, 0, 0, 0.025
3, 0, 0, 0.05
4, 0, 0, 0.075
5, 0, 0, 0.1
6, 0, 0.025, 0
7, 0, 0.025, 0.05
8, 0, 0.025, 0.1
9, 0, 0.05, 0
10, 0, 0.05, 0.025
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*ELEMENT, TYPE=C3D20R, ELSET=EALL
1, 1, 31, 39, 9, 3, 33, 41, 11, 22, 36, 25, 6, 23, 37, 26,
7, 2, 32, 40, 10
2, 3, 33, 41, 11, 5, 35, 43, 13, 23, 37, 26, 7, 24, 38, 27,
8, 4, 34, 42, 12
3, 9, 39, 47, 17, 11, 41, 49, 19, 25, 44, 28, 14, 26, 45, 29,
15, 10, 40, 48, 18
4, 11, 41, 49, 19, 13, 43, 51, 21, 26, 45, 29, 15, 27, 46, 30,
16, 12, 42, 50, 20
5, 31, 61, 69, 39, 33, 63, 71, 41, 52, 66, 55, 36, 53, 67, 56,
37, 32, 62, 70, 40
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*NSET, NSET=FIXED
1, 2, 3, 4, 5, 6, 7, 8, 9, 10, 11, 12, 13, 14, 15, 16
17, 18, 19, 20, 21
*NSET, NSET=TIP
601, 602, 603, 604, 605, 606, 607, 608, 609, 610, 611, 612, 613, 614, 615, 616
617, 618, 619, 620, 621
*MATERIAL, NAME=STEEL
*ELASTIC
2.1e+11, 0.3
*SOLID SECTION, ELSET=EALL, MATERIAL=STEEL
*BOUNDARY
FIXED, 1, 3, 0
*STEP
*STATIC
*CLOAD
601, 3, -47.61904762
602, 3, -47.61904762
603, 3, -47.61904762
604, 3, -47.61904762
605, 3, -47.61904762
606, 3, -47.61904762
607, 3, -47.61904762
608, 3, -47.61904762
609, 3, -47.61904762
610, 3, -47.61904762
611, 3, -47.61904762
612, 3, -47.61904762
613, 3, -47.61904762
614, 3, -47.61904762
615, 3, -47.61904762
616, 3, -47.61904762
617, 3, -47.61904762
618, 3, -47.61904762
619, 3, -47.61904762
620, 3, -47.61904762
621, 3, -47.61904762
*NODE FILE
U
*EL FILE
S
*END STEP
